*NODE
1, 0.000000000000e+00, 0.000000000000e+00, 0.000000000000e+00
2, 2.500000000000e-01, 0.000000000000e+00, 0.000000000000e+00
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*ELEMENT,TYPE=C3D4,ELSET=EALL
1, 1, 2, 7, 32
2, 1, 7, 6, 32
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*NSET,NSET=XEND
5,10,15,20,25,30
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*SOLID SECTION,ELSET=EALL,MATERIAL=M
*MATERIAL,NAME=M
*ELASTIC
1.320000000000e+06, 4.999000000000e-01
*STEP
*STATIC,SOLVER=SPOOLES
*BOUNDARY
1,1,1,0.
5,1,1,1.000000000000e-04
6,1,1,0.
10,1,1,1.000000000000e-04
11,1,1,0.
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125,3,3,0.
*NODE PRINT,NSET=XEND
RF
*EL PRINT,ELSET=EALL
S
*END STEP
